 # ---------- Initialize Simulation ---------------------
units		metal
atom_style      atomic
boundary        p p p

#--- define variables
variable 	a      			equal   ${cutoff}   #--- lattice constant
variable    volume          equal   ${natoms}*${a}^3.0/4.0 #--- natom * vol. of the voronoi cell
variable    lx              equal   floor(${volume}^(1.0/3.0)/${a})

# ---------- Create Atoms ---------------------
#--- define crystal structure and lattice constant a0
#--- define direction vectors, i.e., set x=[100], y=[010], z=[001] and origin point.
#
lattice    fcc ${a} orient    x 1 0 0 orient y 0 1 0 orient z 0 0 1 &
           origin 0.1 0.1 0.1
region    		mybox block 0 ${lx} 0 ${lx} 0 ${lx}   ## define box sizes along x, y, z (in the unit of a0)
create_box      3 mybox              ## create the simulation box, allowing a max of three species
create_atoms    1 box               ## create type-1 metal atoms in the box
#
#--- get number of atoms
variable	natom	equal	"atoms"
variable	natom2	equal	floor(${natom}/3)
variable	natom3	equal	floor(${natom2})
#
group kind1 type 1
set group kind1 type/subset 2 ${natom2} 12345
#
group kind2 type 2
group remain1 subtract all  kind2
#
set group remain1 type/subset 3 ${natom3} 74
group kind3 type 3

# ---------- Define Interatomic Potential ---------------------
pair_style              eam/alloy
pair_coeff              * * ${PathEam}/NiCoCr.lammps.eam Ni Co Cr


# Setup neighbor style
neighbor 1.0 nsq
neigh_modify once no every 1 delay 0 check yes
#neighbor    			0.3 bin            #--- define parameters for neighbor list
#neigh_modify    		delay 5            #--- define parameters for neighbor list

#-----------------------------
#--- compute & dump variables
#-----------------------------
compute     1 all stress/atom NULL pair
dump        1 all custom 1 ${OUT_PATH}/${DumpFile} id type x y z fx fy fz c_1[1] c_1[2] c_1[3] c_1[4] c_1[5] c_1[6]
dump_modify 1 flush yes format line "%d %d %15.14e %15.14e %15.14e %4.3e %4.3e %4.3e %4.3e %4.3e %4.3e %4.3e %4.3e %4.3e"
run	0
undump		1

# -------------------------------------- Minimization -------------------------------------------#
thermo                    1000
fix                       p1        all        box/relax   iso 1.0e-3 #vmax 0.001 #--- equilibrate at p=0


# Define minimization parameters
variable etol equal 0.0
variable ftol equal 1.0e-08
variable maxiter equal 100000
variable maxeval equal 100000
variable dmax equal 1.0e-2
#
# Setup minimization style
min_style	     cg
min_modify	     dmax ${dmax} line quadratic
#
minimize ${etol} ${ftol} ${maxiter} ${maxeval}
#
unfix                     p1

#-----------------------------
#--- compute & dump variables
#-----------------------------
dump        1 all custom 1 ${OUT_PATH}/${DumpFile} id type x y z fx fy fz c_1[1] c_1[2] c_1[3] c_1[4] c_1[5] c_1[6]
dump_modify 1 flush yes append yes format line "%d %d %15.14e %15.14e %15.14e %4.3e %4.3e %4.3e %4.3e %4.3e %4.3e %4.3e %4.3e %4.3e"

write_data	${WriteData} nocoeff

run	0
