# NOTE: This script can be modified for different pair styles
# See in.elastic for more info.

# Choose potential
pair_style	eam/alloy
pair_coeff              * * ${PathEam}/NiCoCr.lammps.eam Ni Co Cr
#
#pair_style                eam
#pair_coeff                * * ${PathEam}/Ni_u3.eam

#pair_style                eam
#pair_coeff                * * ${PathEam}/Cu_u3.eam

# Setup neighbor style
#neighbor 1.0 nsq
#neigh_modify once no every 1 delay 0 check yes

neighbor 2.0 bin
neigh_modify every 1 delay 0 check yes

# Setup minimization style
min_style	     cg
min_modify	     dmax ${dmax} line quadratic

# Setup output
thermo		1000
#thermo_style custom step temp pe press pxx pyy pzz pxy pxz pyz lx ly lz vol
thermo_style custom step temp pe press pxy xy vol
thermo_modify norm no
